// case4gs: written by ppedit
module pypower
{
    version 2;
    baseMVA 100;
}

//
// bus
//
object pypower.bus
{
    name "pp_bus_0";
    bus_i 0;
    type REF;
    Pd 50 MW;
    Qd 30.99 MVAr;
    Gs 0 MW;
    Bs 0 MVAr;
    area 1;
    Vm 1 pu.kV;
    Va 0 deg;
    baseKV 230 kV;
    zone 1;
    Vmax 1.1 pu.kV;
    Vmin 0.9 pu.kV;
}
object pypower.bus
{
    name "pp_bus_1";
    bus_i 1;
    type PQ;
    Pd 170 MW;
    Qd 105.35 MVAr;
    Gs 0 MW;
    Bs 0 MVAr;
    area 1;
    Vm 1 pu.kV;
    Va 0 deg;
    baseKV 230 kV;
    zone 1;
    Vmax 1.1 pu.kV;
    Vmin 0.9 pu.kV;
}
object pypower.bus
{
    name "pp_bus_2";
    bus_i 2;
    type PQ;
    Pd 200 MW;
    Qd 123.94 MVAr;
    Gs 0 MW;
    Bs 0 MVAr;
    area 1;
    Vm 1 pu.kV;
    Va 0 deg;
    baseKV 230 kV;
    zone 1;
    Vmax 1.1 pu.kV;
    Vmin 0.9 pu.kV;
}
object pypower.bus
{
    name "pp_bus_3";
    bus_i 3;
    type PV;
    Pd 80 MW;
    Qd 49.58 MVAr;
    Gs 0 MW;
    Bs 0 MVAr;
    area 1;
    Vm 1 pu.kV;
    Va 0 deg;
    baseKV 230 kV;
    zone 1;
    Vmax 1.1 pu.kV;
    Vmin 0.9 pu.kV;
}

//
// gen
//
object pypower.gen
{
    name "pp_gen_1";
    parent "pp_bus_3";
    bus 3;
    Pg 318 MW;
    Qg 0 MVAr;
    Qmax 100 MVAr;
    Qmin -100 MVAr;
    Vg 1.02 pu.kV;
    mBase 100 MVA;
    status IN_SERVICE;
    Pmax 318 MW;
    Pmin 0 MW;
    Pc1 0 MW;
    Pc2 0 MW;
    Qc1min 0 MVAr;
    Qc1max 0 MVAr;
    Qc2min 0 MVAr;
    Qc2max 0 MVAr;
    ramp_agc 0 MW/min;
    ramp_10 0 MW;
    ramp_30 0 MW;
    ramp_q 0 MVAr/min;
    apf 0 pu;
}
object pypower.gen
{
    name "pp_gen_2";
    parent "pp_bus_0";
    bus 0;
    Pg 0 MW;
    Qg 0 MVAr;
    Qmax 100 MVAr;
    Qmin -100 MVAr;
    Vg 1 pu.kV;
    mBase 100 MVA;
    status IN_SERVICE;
    Pmax 0 MW;
    Pmin 0 MW;
    Pc1 0 MW;
    Pc2 0 MW;
    Qc1min 0 MVAr;
    Qc1max 0 MVAr;
    Qc2min 0 MVAr;
    Qc2max 0 MVAr;
    ramp_agc 0 MW/min;
    ramp_10 0 MW;
    ramp_30 0 MW;
    ramp_q 0 MVAr/min;
    apf 0 pu;
}

//
// branch
//
object pypower.branch
{
    name "pp_branch_1";
    from "pp_bus_0";
    to "pp_bus_1";
    fbus 0;
    tbus 1;
    r 0.01008 pu.Ohm;
    x 0.0504 pu.Ohm;
    b 0.1025 pu.S;
    rateA 250 MVA;
    rateB 250 MVA;
    rateC 250 MVA;
    ratio 0 pu;
    angle 0 deg;
    status IN;
    angmin -360 deg;
    angmax 360 deg;
}
object pypower.branch
{
    name "pp_branch_2";
    from "pp_bus_0";
    to "pp_bus_2";
    fbus 0;
    tbus 2;
    r 0.00744 pu.Ohm;
    x 0.0372 pu.Ohm;
    b 0.0775 pu.S;
    rateA 250 MVA;
    rateB 250 MVA;
    rateC 250 MVA;
    ratio 0 pu;
    angle 0 deg;
    status IN;
    angmin -360 deg;
    angmax 360 deg;
}
object pypower.branch
{
    name "pp_branch_3";
    from "pp_bus_1";
    to "pp_bus_3";
    fbus 1;
    tbus 3;
    r 0.00744 pu.Ohm;
    x 0.0372 pu.Ohm;
    b 0.0775 pu.S;
    rateA 250 MVA;
    rateB 250 MVA;
    rateC 250 MVA;
    ratio 0 pu;
    angle 0 deg;
    status IN;
    angmin -360 deg;
    angmax 360 deg;
}
object pypower.branch
{
    name "pp_branch_4";
    from "pp_bus_2";
    to "pp_bus_3";
    fbus 2;
    tbus 3;
    r 0.01272 pu.Ohm;
    x 0.0636 pu.Ohm;
    b 0.1275 pu.S;
    rateA 250 MVA;
    rateB 250 MVA;
    rateC 250 MVA;
    ratio 0 pu;
    angle 0 deg;
    status IN;
    angmin -360 deg;
    angmax 360 deg;
}
